new reactor.tx_busgrounding_B179 phases=1 bus1=B179.4 bus2=B179.0 r=0.3 x=0.0
new reactor.loadbusgrounding_B3230 phases=1 bus1=B3230.4 bus2=B3230.0 r=10.0 x=0.0
new reactor.loadbusgrounding_B2656 phases=1 bus1=B2656.4 bus2=B2656.0 r=10.0 x=0.0
