new circuit.lv1_14bus angle=-30.0000000000 basekv=11.0000000000 phases=3 bus1=B2577 model=ideal

set defaultbasefrequency=50.0000000000
set basefrequency=50.0000000000

redirect Linecodes.dss
redirect lines.dss
redirect Transformers.dss
redirect Loads.dss
redirect Switches.dss
redirect Groundings.dss

batchedit load..* kw=1
solve
export Voltages
